New LineGeometry.1PH-NONEBUSBARNONEBUSBAR  nconds=2  nphases=1
~ cond=1  wire=BUSBAR x=0 h=12.192 units=m
~ cond=2  wire=BUSBAR x=0 h=10.668 units=m
~ reduce=y
New LineGeometry.1PH-NONENONEAL_1/0_7STRACSR_1/0_6/1  nconds=2  nphases=1
~ cond=1  wire=AL_1/0_7STR x=0 h=12.192 units=m
~ cond=2  wire=ACSR_1/0_6/1 x=0 h=10.668 units=m
~ reduce=y
New LineGeometry.1PH-AL_#2_7STRNONENONEACSR_1/0_6/1  nconds=2  nphases=1
~ cond=1  wire=AL_#2_7STR x=0 h=12.192 units=m
~ cond=2  wire=ACSR_1/0_6/1 x=0 h=10.668 units=m
~ reduce=y
New LineGeometry.1PH-NONEAL_1/0_7STRNONEACSR_1/0_6/1  nconds=2  nphases=1
~ cond=1  wire=AL_1/0_7STR x=0 h=12.192 units=m
~ cond=2  wire=ACSR_1/0_6/1 x=0 h=10.668 units=m
~ reduce=y
New LineGeometry.3PH_HORIZ_LG_1C-AL_4/0_7STRAL_4/0_7STRAL_4/0_7STRACSR_1/0_6/1  nconds=4  nphases=3
~ cond=1  wire=AL_4/0_7STR x=-1.39598 h=12.192 units=m
~ cond=2  wire=AL_4/0_7STR x=0 h=12.192 units=m
~ cond=3  wire=AL_4/0_7STR x=1.39598 h=12.192 units=m
~ cond=4  wire=ACSR_1/0_6/1 x=0 h=10.9728 units=m
~ reduce=y
New LineGeometry.1PH-NONENONEAL_#2_7STRACSR_1/0_6/1  nconds=2  nphases=1
~ cond=1  wire=AL_#2_7STR x=0 h=12.192 units=m
~ cond=2  wire=ACSR_1/0_6/1 x=0 h=10.668 units=m
~ reduce=y
New LineGeometry.3PH_HORIZ_LG_1C-BUSBARBUSBARBUSBARBUSBAR  nconds=4  nphases=3
~ cond=1  wire=BUSBAR x=-1.39598 h=12.192 units=m
~ cond=2  wire=BUSBAR x=0 h=12.192 units=m
~ cond=3  wire=BUSBAR x=1.39598 h=12.192 units=m
~ cond=4  wire=BUSBAR x=0 h=10.9728 units=m
~ reduce=y
New LineGeometry.1PH-NONEAL_#2_7STRNONEACSR_1/0_6/1  nconds=2  nphases=1
~ cond=1  wire=AL_#2_7STR x=0 h=12.192 units=m
~ cond=2  wire=ACSR_1/0_6/1 x=0 h=10.668 units=m
~ reduce=y
New LineGeometry.1PH-AL_1/0_7STRNONENONEACSR_1/0_6/1  nconds=2  nphases=1
~ cond=1  wire=AL_1/0_7STR x=0 h=12.192 units=m
~ cond=2  wire=ACSR_1/0_6/1 x=0 h=10.668 units=m
~ reduce=y
New LineGeometry.1PH-NONENONEBUSBARBUSBAR  nconds=2  nphases=1
~ cond=1  wire=BUSBAR x=0 h=12.192 units=m
~ cond=2  wire=BUSBAR x=0 h=10.668 units=m
~ reduce=y
New LineGeometry.1PH-NONENONECU_#6_1STRACSR_1/0_6/1  nconds=2  nphases=1
~ cond=1  wire=CU_#6_1STR x=0 h=12.192 units=m
~ cond=2  wire=ACSR_1/0_6/1 x=0 h=10.668 units=m
~ reduce=y
New LineGeometry.1PH-CU_#6_1STRNONENONEACSR_1/0_6/1  nconds=2  nphases=1
~ cond=1  wire=CU_#6_1STR x=0 h=12.192 units=m
~ cond=2  wire=ACSR_1/0_6/1 x=0 h=10.668 units=m
~ reduce=y
New LineGeometry.3PH_HORIZ_LG_1C-CU_#2_7STRCU_#2_7STRCU_#2_7STRACSR_1/0_6/1  nconds=4  nphases=3
~ cond=1  wire=CU_#2_7STR x=-1.39598 h=12.192 units=m
~ cond=2  wire=CU_#2_7STR x=0 h=12.192 units=m
~ cond=3  wire=CU_#2_7STR x=1.39598 h=12.192 units=m
~ cond=4  wire=ACSR_1/0_6/1 x=0 h=10.9728 units=m
~ reduce=y
New LineGeometry.1PH-NONECU_#6_1STRNONEACSR_1/0_6/1  nconds=2  nphases=1
~ cond=1  wire=CU_#6_1STR x=0 h=12.192 units=m
~ cond=2  wire=ACSR_1/0_6/1 x=0 h=10.668 units=m
~ reduce=y
New LineGeometry.1PH-BUSBARNONENONEBUSBAR  nconds=2  nphases=1
~ cond=1  wire=BUSBAR x=0 h=12.192 units=m
~ cond=2  wire=BUSBAR x=0 h=10.668 units=m
~ reduce=y
New LineGeometry.3PH_VERT_1C-AL_556_19STRAL_556_19STRAL_556_19STRACSR_1/0_6/1  nconds=4  nphases=3
~ cond=1  wire=AL_556_19STR x=0 h=11.683 units=m
~ cond=2  wire=AL_556_19STR x=0 h=13.1064 units=m
~ cond=3  wire=AL_556_19STR x=0 h=14.6304 units=m
~ cond=4  wire=ACSR_1/0_6/1 x=0 h=10.3632 units=m
~ reduce=y
New LineGeometry.3PH_VERT_1C-AL_4/0_7STRAL_4/0_7STRAL_4/0_7STRACSR_1/0_6/1  nconds=4  nphases=3
~ cond=1  wire=AL_4/0_7STR x=0 h=11.683 units=m
~ cond=2  wire=AL_4/0_7STR x=0 h=13.1064 units=m
~ cond=3  wire=AL_4/0_7STR x=0 h=14.6304 units=m
~ cond=4  wire=ACSR_1/0_6/1 x=0 h=10.3632 units=m
~ reduce=y
New LineGeometry.3PH_HORIZ_LG_1C-AL_336_19STRAL_336_19STRAL_336_19STRACSR_1/0_6/1  nconds=4  nphases=3
~ cond=1  wire=AL_336_19STR x=-1.39598 h=12.192 units=m
~ cond=2  wire=AL_336_19STR x=0 h=12.192 units=m
~ cond=3  wire=AL_336_19STR x=1.39598 h=12.192 units=m
~ cond=4  wire=ACSR_1/0_6/1 x=0 h=10.9728 units=m
~ reduce=y
New LineGeometry.3PH_HORIZ_LG_1C-AL_1/0_7STRAL_1/0_7STRAL_1/0_7STRACSR_1/0_6/1  nconds=4  nphases=3
~ cond=1  wire=AL_1/0_7STR x=-1.39598 h=12.192 units=m
~ cond=2  wire=AL_1/0_7STR x=0 h=12.192 units=m
~ cond=3  wire=AL_1/0_7STR x=1.39598 h=12.192 units=m
~ cond=4  wire=ACSR_1/0_6/1 x=0 h=10.9728 units=m
~ reduce=y
New LineGeometry.3PH_HORIZ_LG_1C-AL_556_19STRAL_556_19STRAL_556_19STRACSR_1/0_6/1  nconds=4  nphases=3
~ cond=1  wire=AL_556_19STR x=-1.39598 h=12.192 units=m
~ cond=2  wire=AL_556_19STR x=0 h=12.192 units=m
~ cond=3  wire=AL_556_19STR x=1.39598 h=12.192 units=m
~ cond=4  wire=ACSR_1/0_6/1 x=0 h=10.9728 units=m
~ reduce=y
New LineGeometry.3PH_HORIZ_LG_1C-AL_#2_7STRAL_#2_7STRAL_#2_7STRACSR_1/0_6/1  nconds=4  nphases=3
~ cond=1  wire=AL_#2_7STR x=-1.39598 h=12.192 units=m
~ cond=2  wire=AL_#2_7STR x=0 h=12.192 units=m
~ cond=3  wire=AL_#2_7STR x=1.39598 h=12.192 units=m
~ cond=4  wire=ACSR_1/0_6/1 x=0 h=10.9728 units=m
~ reduce=y
New LineGeometry.1PH-NONENONEACSR_1/0_6/1ACSR_1/0_6/1  nconds=2  nphases=1
~ cond=1  wire=ACSR_1/0_6/1 x=0 h=12.192 units=m
~ cond=2  wire=ACSR_1/0_6/1 x=0 h=10.668 units=m
~ reduce=y
New LineGeometry.1PH-NONEACSR_1/0_6/1NONEACSR_1/0_6/1  nconds=2  nphases=1
~ cond=1  wire=ACSR_1/0_6/1 x=0 h=12.192 units=m
~ cond=2  wire=ACSR_1/0_6/1 x=0 h=10.668 units=m
~ reduce=y
New LineGeometry.3PH_VERT_1C-AL_336_19STRAL_336_19STRAL_336_19STRACSR_1/0_6/1  nconds=4  nphases=3
~ cond=1  wire=AL_336_19STR x=0 h=11.683 units=m
~ cond=2  wire=AL_336_19STR x=0 h=13.1064 units=m
~ cond=3  wire=AL_336_19STR x=0 h=14.6304 units=m
~ cond=4  wire=ACSR_1/0_6/1 x=0 h=10.3632 units=m
~ reduce=y
New LineGeometry.3PH_VERT_1C-CU_#2_7STRCU_#2_7STRCU_#2_7STRACSR_1/0_6/1  nconds=4  nphases=3
~ cond=1  wire=CU_#2_7STR x=0 h=11.683 units=m
~ cond=2  wire=CU_#2_7STR x=0 h=13.1064 units=m
~ cond=3  wire=CU_#2_7STR x=0 h=14.6304 units=m
~ cond=4  wire=ACSR_1/0_6/1 x=0 h=10.3632 units=m
~ reduce=y
New LineGeometry.2PH_VERT_1C-AL_#2_7STRNONEAL_#2_7STRACSR_1/0_6/1  nconds=3  nphases=2
~ cond=1  wire=AL_#2_7STR x=-1.395981 h=11.9634 units=m
~ cond=2  wire=AL_#2_7STR x=1.395981 h=11.9634 units=m
~ cond=3  wire=ACSR_1/0_6/1 x=0 h=10.668 units=m
~ reduce=y
New LineGeometry.2PH_HORIZ_LG_1C-BUSBARNONEBUSBARBUSBAR  nconds=3  nphases=2
~ cond=1  wire=BUSBAR x=-1.395981 h=11.9634 units=m
~ cond=2  wire=BUSBAR x=1.395981 h=11.9634 units=m
~ cond=3  wire=BUSBAR x=0 h=10.668 units=m
~ reduce=y
New LineGeometry.2PH_VERT_1C-AL_1/0_7STRNONEAL_1/0_7STRACSR_1/0_6/1  nconds=3  nphases=2
~ cond=1  wire=AL_1/0_7STR x=-1.395981 h=11.9634 units=m
~ cond=2  wire=AL_1/0_7STR x=1.395981 h=11.9634 units=m
~ cond=3  wire=ACSR_1/0_6/1 x=0 h=10.668 units=m
~ reduce=y
New LineGeometry.3PH_VERT_1C-AL_1/0_7STRAL_1/0_7STRAL_1/0_7STRACSR_1/0_6/1  nconds=4  nphases=3
~ cond=1  wire=AL_1/0_7STR x=0 h=11.683 units=m
~ cond=2  wire=AL_1/0_7STR x=0 h=13.1064 units=m
~ cond=3  wire=AL_1/0_7STR x=0 h=14.6304 units=m
~ cond=4  wire=ACSR_1/0_6/1 x=0 h=10.3632 units=m
~ reduce=y
New LineGeometry.2PH_HORIZ_LG_1C-AL_1/0_7STRAL_1/0_7STRNONEACSR_1/0_6/1  nconds=3  nphases=2
~ cond=1  wire=AL_1/0_7STR x=-1.395981 h=11.9634 units=m
~ cond=2  wire=AL_1/0_7STR x=1.395981 h=11.9634 units=m
~ cond=3  wire=ACSR_1/0_6/1 x=0 h=10.668 units=m
~ reduce=y
New LineGeometry.3PH_HORIZ_LG_1C-ACSR_1/0_6/1ACSR_1/0_6/1ACSR_1/0_6/1ACSR_1/0_6/1  nconds=4  nphases=3
~ cond=1  wire=ACSR_1/0_6/1 x=-1.39598 h=12.192 units=m
~ cond=2  wire=ACSR_1/0_6/1 x=0 h=12.192 units=m
~ cond=3  wire=ACSR_1/0_6/1 x=1.39598 h=12.192 units=m
~ cond=4  wire=ACSR_1/0_6/1 x=0 h=10.9728 units=m
~ reduce=y
New LineGeometry.2PH_HORIZ_LG_1C-NONECU_#6_1STRCU_#6_1STRACSR_1/0_6/1  nconds=3  nphases=2
~ cond=1  wire=CU_#6_1STR x=-1.395981 h=11.9634 units=m
~ cond=2  wire=CU_#6_1STR x=1.395981 h=11.9634 units=m
~ cond=3  wire=ACSR_1/0_6/1 x=0 h=10.668 units=m
~ reduce=y
New LineGeometry.3PH_VERT_1C-AL_#2_7STRAL_#2_7STRAL_#2_7STRACSR_1/0_6/1  nconds=4  nphases=3
~ cond=1  wire=AL_#2_7STR x=0 h=11.683 units=m
~ cond=2  wire=AL_#2_7STR x=0 h=13.1064 units=m
~ cond=3  wire=AL_#2_7STR x=0 h=14.6304 units=m
~ cond=4  wire=ACSR_1/0_6/1 x=0 h=10.3632 units=m
~ reduce=y
