// Script for running Solar Ramp Function.

!*** first compile the IEEE 123 bus test case and solve it ***
Compile (IEEE123Master.dss)

RegControl.creg1a.maxtapchange=1  Delay=15  !Allow only one tap change per solution. This one moves first
RegControl.creg2a.maxtapchange=1  Delay=30  !Allow only one tap change per solution
RegControl.creg3a.maxtapchange=1  Delay=30  !Allow only one tap change per solution
RegControl.creg4a.maxtapchange=1  Delay=30  !Allow only one tap change per solution
RegControl.creg3c.maxtapchange=1  Delay=30  !Allow only one tap change per solution
RegControl.creg4b.maxtapchange=1  Delay=30  !Allow only one tap change per solution
RegControl.creg4c.maxtapchange=1  Delay=30  !Allow only one tap change per solution

Set MaxControlIter=30

! Solve executes the solution for the present solution mode, which is "snapshot".

solve

! 300-sec solar ramp screen
// New Loadshape.SolarRamp npts=300 Interval=(1 3600 /) mult=(file=solarramp.csv)
New Loadshape.SolarRamp npts=3000 Interval=(1 3600 /) mult=(file=..\..\examples\loadshapes\PVLoadshape-1sec-2900pts.csv)  action=normalize


! define the generator
New Generator.2MWGen   Bus1=450 kV=4.16  kW=2000  PF=1  Duty=SolarRamp

! Solve and let regulators settle out with generator on line
Solve

! Put Monitor in Line L99 to capture voltages and currents
New Monitor.Mon1 Element=Line.L99 Terminal=1

New monitor.reg3A Transformer.Reg3A 2 mode=2
New monitor.reg3C Transformer.Reg3c 2 mode=2

New monitor.reg4A Transformer.Reg4A 2 mode=2
New monitor.reg4B Transformer.Reg4B 2 mode=2
New monitor.reg4C Transformer.Reg4C 2 mode=2


! Run 300-point dutycycle
Solve mode=dutycycle number=2900 stepsize=1s

! Plot Monitor Results
Plot Monitor object=Mon1  Channels=(1,3,5) Bases=[2400, 2400, 2400]
Plot Monitor object=Mon1  Channels=(7, 9, 11)


Export monitors reg3a
Plot monitor object= reg3a channels=(1 )
Plot monitor object= reg3c channels=(1 )
Plot monitor object= reg4a channels=(1 )
Plot monitor object= reg4b channels=(1 )
Plot monitor object= reg4c channels=(1 )
