Compile (C:\opendss\IEEETestCases\123Bus\IEEE123Master.dss)


New Monitor.M1 Line.L115 1  mode=17

solve
Buscoords Buscoords.dat   ! load in bus coordinates

set mode=daily

get mode
Get number
Get stepsize

redirect SetDailyLoadShape.DSS

solve

export monitor m1

fileedit C:\opendss\IEEETestCases\123Bus\ieee123_Mon_m1.csv

Export monitors m1
Plot monitor object= m1 channels=(1 3 5 )  bases=[4000 4000 4000]
help
