//var @root=~/src/opendss/Distrib/
//set datapath=@root

redirect ~/src/opendss/Source/LazDSS/CMD/ieee13_base.dss
solve
export summary

//redirect ~/src/opendss/Source/LazDSS/CMD/ieee13assets_base.dss
//solve
//export summary

redirect ~/src/opendss/Source/LazDSS/CMD/ieee8500_base.dss
solve
export summary

redirect ~/src/opendss/Source/LazDSS/CMD/ieee8500u_base.dss
solve
export summary
